// COMSOL Multiphysics 5.4.0.246 model "simple.mph"
// Outline of the model tree
// Components: comp1 "2d", comp2 "3d"

Parameters
  V_int = 0
  V_ext = 0

Selections
  sel1: Explicit "2d_ext_edge" [comp1] on boundaries 1, 2, 5, 6
  sel2: Explicit "2d_int_edge" [comp1] on boundaries 3, 4, 7, 8
  sel3: Explicit "3d_ext_surface" [comp2] on boundaries 1-4, 9-12
  sel4: Explicit "3d_int_surface" [comp2] on boundaries 5-8, 13-16
  sel5: Explicit "2d_surface" [comp1] on domains 1
  sel6: Explicit "3d_volume" [comp2] on domains 1
  sel8: Explicit "3d_ext_edge" [comp2] on edges 1-4, 9-16, 22
  sel7: Explicit "3d_int_edge" [comp2] on edges 5-8, 17-24
  uni1: Union "2d_edge" [comp1] | entitydim = 1; input = {sel1, sel2}
  uni2: Union "3d_edge" [comp2] | entitydim = 1; input = {sel7, sel8}
  uni3: Union "3d_surface" [comp2] | entitydim = 2; input = {sel3, sel4}

Geometry
  geom1 "geom" [comp1] (2D, length unit m)
    c1: Circle "ext" | r = 0.1
    c2: Circle "int" | pos = {0.02, 0.00}; r = 0.05
    dif1: Difference "diff" | input = c1; input2 = c2
    fin: Finalize "union"
  geom2 "geom" [comp2] (3D, length unit m)
    sph1: Sphere "ext" | r = 0.1
    sph2: Sphere "int" | pos = {0.02, 0.02, 0.02}; r = 0.05
    dif1: Difference "diff" | input = sph1; input2 = sph2
    fin: Finalize "union"

Materials
  mat1: Common "dom" [comp1] on all domains
    def "Basic"
      relpermittivity = 1
  mat2: Common "dom" [comp2] on all domains
    def "Basic"
      relpermittivity = 1

Physics
  es_2d: Electrostatics "es" [geom1] on all domains
    dependent variable V_2d
    ccn1: ChargeConservation (default)
    zc1: ZeroCharge (default)
    init1: init "initial" (default)
    pot1: ElectricPotential "ext" on selection sel1 | V0 = V_ext
    pot2: ElectricPotential "int" on selection sel2 | V0 = V_int
  es_3d: Electrostatics "es" [geom2] on all domains
    dependent variable V_3d
    ccn1: ChargeConservation (default)
    zc1: ZeroCharge (default)
    init1: init "initial" (default)
    pot1: ElectricPotential "ext" on selection sel3 | V0 = V_ext
    pot2: ElectricPotential "int" on selection sel4 | V0 = V_int

Mesh
  mesh1 "mesh" [geom1]
    size: MeshSizeDefault "tri" | hmax = 0.0134; hmin = 6.0E-5; hcurve = 0.3; hgrad = 1.3
    ftri1: FreeTri "Free Triangular 1" on remaining entities
  mesh2 "mesh" [geom2]
    size: MeshSizeDefault | hmax = 0.02; hmin = 0.0036; hcurve = 0.6; hnarrow = 0.5; hgrad = 1.5
    ftet1: FreeTet "tri" on remaining entities

Studies
  std1 "study"
    param: Parametric | pname = {V_int, V_ext}; plistarr = {0 1, 1 0}; punit = {, }
    stat: Stationary "sta"

Solver configurations
  sol1 "sol" (study std1)
    v1: Variables "Dependent Variables 1"
    s1: Stationary "Stationary Solver 1"
      dDef: Direct
      p1: Parametric | pname = {V_int, V_ext}; plistarr = {0 1, 1 0}; punit = {, }; pcontinuationmode = no
      se1: Segregated
        ss1: SegregatedStep | segvar = {comp1_V_2d}; linsolver = dDef
        ss2: SegregatedStep | segvar = {comp2_V_3d}; linsolver = i1
      i1: Iterative | linsolver = cg
        mg1: Multigrid | prefun = amg

Datasets
  dset1: Solution "2d" | solution = sol1
  dset2: Solution "3d" | solution = sol1

Tables
  tbl1: Table
    // Volume Integration 1 (1)
    V_int | V_ext | 1 (m^3)
    0 | 1 | 0.00366523
    1 | 0 | 0.00366523

Plots
  pg1: PlotGroup2D "2d_voltage" | data = dset1
    surf1: Surface "value" | expr = V_2d
  pg2: PlotGroup3D "3d_voltage" | data = dset2
    vol1: Volume "value" | expr = V_3d